# LAMMPS input file
# Bulk TIP4P/2005 water system
# author : Simon Gravelle

# variables
variable pre equal 1 # desired pressure (Atm)
variable tem equal 293.15 # desired temperature (K)

# main parameters
units real # style of units (A, fs, Kcal/mol)
atom_style full # molecular + charge
bond_style harmonic
angle_style harmonic
boundary p p p # periodic boundary conditions
pair_style lj/cut/tip4p/long 1 2 1 1 0.105 10 # cut-off 1 nm
kspace_style pppm/tip4p 1.0e-5
pair_modify mix arithmetic tail yes # eij = sqrt(ei*ej), dij = 0.5*(di+dj)

# import positions and parameters
read_data topology.data
include PARM.lammps

# groups
group wat type 1 2 # water
group hyd type 2 # hydrogen

# dynamics
timestep 2 # (fs)
fix myshk wat shake 1.0e-5 200 0 b 1 a 1 # shake with increased precision
fix mynpt all npt temp ${tem} ${tem} 100 iso ${pre} ${pre} 1000 # npt equilibrium

# output
dump dp1 wat xtc 500 traj.xtc # print atom positions every 1 picosecond
thermo 1000

# run
run 500000 # 1 ns
